// SBML level 3 version 2

model PD_alphaSyn_v3_control()
  // model units - time: second

  // Compartments:
  compartment cell = 1;

  // Species:
  species pRab35 in cell = 0.04852988;  // substance in uM
  species aSyn in cell = 0.09137594;  // substance in uM
  species aggregate in cell = 0.01908962;  // substance in uM
  species MVB in cell = 0.29843;  // substance in uM
  species exosomal in cell = 0.1128823;  // substance in uM

  // Parameters:
  Km_CMA = 0.5;
  Km_clear = 0.5;
  k_deg_MVB = 0.02;
  k_secrete = 0.1;
  k_MVB = 0.02;
  Km_lrrk2 = 1.717612;
  k_dephos = 0.1527038;
  Vmax_CMA = 0.06775425;
  k_nuc = 1.629428;
  Vmax_clear = 0.3149932;
  Km_MVB = 0.1140874;
  k_load = 0.8913047;
  Km_load = 0.430732;
  Vmax_eff = 0.2078863;
  k_prod_eff = 0.01569881;
  LAMP2A = 0.2;
  rab35_block = 1;
  LRRK2_active = 0.1;
  Rab35_tot = 1;

  // Reactions:
  Rab35_phosphorylation: => pRab35; cell*(Vmax_eff*LRRK2_active*(Rab35_tot - pRab35)/(Km_lrrk2 + (Rab35_tot - pRab35)));
  Rab35_dephosphorylation: pRab35 => ; cell*k_dephos*pRab35;
  alphaSyn_production: => aSyn; cell*k_prod_eff;
  alphaSyn_CMA_degradation: aSyn => ; cell*(Vmax_CMA*LAMP2A*aSyn/(Km_CMA + aSyn));
  alphaSyn_nucleation: aSyn => aggregate; cell*k_nuc*aSyn*aSyn;
  aggregate_lysosomal_clearance: aggregate => ; cell*(Vmax_clear*LAMP2A*aggregate/(Km_clear + aggregate));
  MVB_formation: => MVB; cell*(k_MVB*pRab35*rab35_block/(Km_MVB + pRab35*rab35_block));  // modifiers: pRab35
  MVB_degradation: MVB => ; cell*k_deg_MVB*MVB;
  aggregate_loading_into_MVB: aggregate => exosomal; cell*(k_load*MVB*aggregate/(Km_load + aggregate));  // modifiers: MVB
  exosome_secretion: exosomal => ; cell*k_secrete*exosomal;

  // Unit definitions:
  unit uM = 1e-6 mole / litre;
end
